# OpenSim document version 30000
Model modelWithPrescribedMotion:
  credits: Daniel A. Jacobs, Ajay Seth
  length_units: meters
  force_units: N
  gravity: 0 -9.80665 0
  BodySet:
    Body ground: mass=0 mass_center=(0 0 0) inertia_xx=1 inertia_yy=1 inertia_zz=1
    Body Platform: mass=1 mass_center=(0 0 0) inertia_xx=1 inertia_yy=1 inertia_zz=1 meshes=box.vtp
      WeldJoint PlatformToGround: parent_body=ground location_in_parent=(0 0 0) location=(0 0 0)
    Body Pelvis_massless: mass=0 mass_center=(0 0 0) inertia_xx=0 inertia_yy=0 inertia_zz=0
      SliderJoint PelvisMasslessToPlatform: parent_body=Platform location_in_parent=(0 0.025 0) location=(0 0 0)
        Coordinate Pelvis_tx: motion_type=translational default_value=0 range=(0 100)
    Body Pelvis: mass=0.5 mass_center=(0 0 0) inertia_xx=0.0001 inertia_yy=0.006666667 inertia_zz=0.0001
        meshes=sphere.vtp
      SliderJoint PelvisToPelvisMassless: parent_body=Pelvis_massless location_in_parent=(0 0 0)
          orientation_in_parent=(0 0 1.570796) location=(0 0 0) orientation=(0 0 1.570796)
        Coordinate Pelvis_ty: motion_type=translational default_value=1 range=(0 5)
    Body LeftThigh: mass=0.05 mass_center=(0 0 0) inertia_xx=0.0001 inertia_yy=0.0001 inertia_zz=0.001041667
        meshes=sphere.vtp
      PinJoint LThighToPelvis: parent_body=Pelvis location_in_parent=(0 0 -0.2) location=(0 0.25 0)
        Coordinate LHip_rz: motion_type=rotational default_value=1.047198 range=(-1.745329 1.745329) prescribed=true
          prescribed_function: SimmSpline: x=(0 0.02 0.04 0.06 0.08 0.1 0.12 0.14 0.16 0.18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)
              y=(-0.289027 -0.293564 -0.288503 -0.268781 -0.234572 -0.185878 -0.124791 -0.0551524 0.0165806 0.0860447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)
    Body RightThigh: mass=0.05 mass_center=(0 0 0) inertia_xx=0.0001 inertia_yy=0.0001 inertia_zz=0.001041667
        meshes=sphere.vtp
      PinJoint RThighToPelvis: parent_body=Pelvis location_in_parent=(0 0 0.2) location=(0 0.25 0)
        Coordinate RHip_rz: motion_type=rotational default_value=0 range=(-1.745329 1.745329) prescribed=true
          prescribed_function: SimmSpline: x=(0 0.02 0.04 0.06 0.08 0.1 0.12 0.14 0.16 0.18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)
              y=(0.429526 0.426733 0.421148 0.413294 0.400728 0.380133 0.353255 0.321315 0.285885 0.247662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)
    Body LeftShank: mass=0.05 mass_center=(0 0 0) inertia_xx=0.0001 inertia_yy=0.0001 inertia_zz=0.001041667
        meshes=sphere.vtp
      PinJoint LShankToLThigh: parent_body=LeftThigh location_in_parent=(0 -0.25 0) location=(0 0.25 0)
        Coordinate LKnee_rz: motion_type=rotational default_value=0 range=(-2.443461 0) prescribed=true
          prescribed_function: SimmSpline: x=(0 0.02 0.04 0.06 0.08 0.1 0.12 0.14 0.16 0.18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)
              y=(-0.143117 -0.197048 -0.265116 -0.352033 -0.454833 -0.570199 -0.69115 -0.805644 -0.901986 -0.97145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)
    Body RightShank: mass=0.05 mass_center=(0 0 0) inertia_xx=0.0001 inertia_yy=0.0001 inertia_zz=0.001041667
        meshes=sphere.vtp
      PinJoint RShankToRThigh: parent_body=RightThigh location_in_parent=(0 -0.25 0) location=(0 0.25 0)
        Coordinate RKnee_rz: motion_type=rotational default_value=0 range=(-2.443461 0)
  ForceSet:
    HuntCrossleyForce LFootForce: transition_velocity=0.2
      ContactParametersSet contact_parameters:
        ContactParameters: geometry=(LFootContact PlatformContact) stiffness=10000 dissipation=1 static_friction=1.2
            dynamic_friction=0.4 viscous_friction=0.4
    HuntCrossleyForce RFootForce: transition_velocity=0.2
      ContactParametersSet contact_parameters:
        ContactParameters: geometry=(RFootContact PlatformContact) stiffness=10000 dissipation=1 static_friction=1.2
            dynamic_friction=0.4 viscous_friction=0.4
    HuntCrossleyForce LKneeForce: transition_velocity=0.2
      ContactParametersSet contact_parameters:
        ContactParameters: geometry=(LKneeContact PlatformContact) stiffness=10000 dissipation=1 static_friction=0.8
            dynamic_friction=0.4 viscous_friction=0.4
    HuntCrossleyForce RKneeForce: transition_velocity=0.2
      ContactParametersSet contact_parameters:
        ContactParameters: geometry=(RKneeContact PlatformContact) stiffness=10000 dissipation=1 static_friction=0.8
            dynamic_friction=0.4 viscous_friction=0.4
    HuntCrossleyForce LHipForce: transition_velocity=0.2
      ContactParametersSet contact_parameters:
        ContactParameters: geometry=(LHipContact PlatformContact) stiffness=10000 dissipation=1 static_friction=0.8
            dynamic_friction=0.4 viscous_friction=0.4
    HuntCrossleyForce RHipForce: transition_velocity=0.2
      ContactParametersSet contact_parameters:
        ContactParameters: geometry=(RHipContact PlatformContact) stiffness=10000 dissipation=1 static_friction=0.8
            dynamic_friction=0.4 viscous_friction=0.4
    CoordinateLimitForce LKneeLimitTorque: coordinate=LKnee_rz upper_stiffness=0.5 [N*m/degree] upper_limit=0 [degrees]
        lower_stiffness=0.5 [N*m/degree] lower_limit=-140 [degrees] damping=0.025 transition=5 [degrees]
        compute_dissipation_energy=false
    CoordinateLimitForce RKneeLimitTorque: coordinate=RKnee_rz upper_stiffness=0.5 upper_limit=0 lower_stiffness=0.5
        lower_limit=-140 damping=0.025 transition=5 compute_dissipation_energy=false
    CoordinateLimitForce LHipLimitTorque: coordinate=LHip_rz upper_stiffness=0.5 upper_limit=100 lower_stiffness=0.5
        lower_limit=-100 damping=0.025 transition=5 compute_dissipation_energy=false
    CoordinateLimitForce RHipLimitTorque: coordinate=RHip_rz upper_stiffness=0.5 upper_limit=100 lower_stiffness=0.5
        lower_limit=-100 damping=0.025 transition=5 compute_dissipation_energy=false
    TorqueActuator torqueAct_RK: bodyA=RightThigh bodyB=RightShank torque_is_global=false axis=(0 0 1) optimal_force=10
  ContactGeometrySet:
    ContactSphere LFootContact: body_name=LeftShank location=(0 -0.2 0) radius=0.05
    ContactSphere RFootContact: body_name=RightShank location=(0 -0.2 0) radius=0.05
    ContactSphere LKneeContact: body_name=LeftShank location=(0 0.25 0) radius=0.05
    ContactSphere RKneeContact: body_name=RightShank location=(0 0.25 0) radius=0.05
    ContactSphere LHipContact: body_name=Pelvis location=(0 0 -0.2) radius=0.05
    ContactSphere RHipContact: body_name=Pelvis location=(0 0 0.2) radius=0.05
    ContactHalfSpace PlatformContact: body_name=Platform location=(0 0.025 0) orientation=(0 0 -1.570796)
